// SBML level 2 version 1

model Tutorial_MultiApp_non_spatial_Deterministic()
  // Tutorial_MultiApp_non-spatial Deterministic

  // Compartments:
  compartment cyt in pm = 14891.9 um3;
  compartment nuc in nm = 3697.014 um3;
  compartment EC = 124712.1 um3;
  compartment pm in EC = 4738.641 um2;  // 2-D
  compartment nm in cyt = 1406.773 um2;  // 2-D

  // Species:
  species Ran_cyt in cyt = 0;  // substance in molecules
  species C_cyt in cyt = 0;  // substance in molecules
  species RanC_nuc in nuc = 0.0004493166;  // substance in molecules
  species RanC_cyt in cyt = 0;  // substance in molecules

  // Parameters:
  Kf_r0 = 1 s_1;
  Kr_r0 = 1000 s_1_uM_1;
  kfl_flux0 = 2 um_s_1;

  // Reactions:
  r0: RanC_cyt -> Ran_cyt + C_cyt; Kf_r0*RanC_cyt + (-(Kr_r0*Ran_cyt*C_cyt));
  flux0: RanC_cyt -> RanC_nuc; kfl_flux0*(RanC_cyt + (-RanC_nuc));
    I = 0 pA_um_2; netValence = 1 _one_;

  // Unit definitions:
  unit substance = item;
  unit volume = (1e-18 metre)^3;
  unit area = (1e-12 metre)^2;
  unit length = 1e-6 metre;
  unit time = second;
  unit molecules = item;
  unit uM_s_1 = 1e-3 dimensionless * mole / (metre^3 * second);
  unit s_1 = 1 / second;
  unit s_1_uM_1 = 1000 dimensionless * metre^3 / (mole * second);
  unit uM_um_s_1 = 1e-9 dimensionless * mole / (metre^2 * second);
  unit pA_um_2 = ampere / metre^2;
  unit _one_ = dimensionless;
  unit um_s_1 = 1e-6 dimensionless * metre / second;
end
