// SBML level 2 version 3

model EGFstim100()
  // Brown2004 - NGF and EGF signaling

  // Compartments:
  compartment cell = 1;

  // Species:
  species EGF in cell = 10002000;
  species NGF in cell = 0;
  species freeEGFReceptor in cell = 80000;
  species boundEGFReceptor in cell = 0;
  species freeNGFReceptor in cell = 10000;
  species boundNGFReceptor in cell = 0;
  species SosInactive in cell = 120000;
  species SosActive in cell = 0;
  species P90RskInactive in cell = 120000;
  species P90RskActive in cell = 0;
  species RasInactive in cell = 120000;
  species RasActive in cell = 0;
  species RasGapActive in cell = 120000;
  species Raf1Inactive in cell = 120000;
  species Raf1Active in cell = 0;
  species BRafInactive in cell = 120000;
  species BRafActive in cell = 0;
  species MekInactive in cell = 600000;
  species MekActive in cell = 0;
  species ErkInactive in cell = 600000;
  species ErkActive in cell = 0;
  species PI3KInactive in cell = 120000;
  species PI3KActive in cell = 0;
  species AktInactive in cell = 120000;
  species AktActive in cell = 0;
  species C3GInactive in cell = 120000;
  species C3GActive in cell = 0;
  species Rap1Inactive in cell = 120000;
  species Rap1Active in cell = 0;
  species RapGapActive in cell = 120000;
  species PP2AActive in cell = 120000;
  species Raf1PPtase in cell = 120000;

  // Parameters:
  krbEGF = 6.190178e-5;
  kruEGF = 0.02757271;
  krbNGF = 2.736377e-7;
  kruNGF = 0.002591393;
  kEGF = 1488.999;
  KmEGF = 2010790;
  kNGF = 144.0068;
  KmNGF = 777.7228;
  kdSos = 2794.645;
  KmdSos = 848898.4;
  kSos = 14.90336;
  KmSos = 13171.87;
  kRasGap = 4906.017;
  KmRasGap = 455043.4;
  kRasToRaf1 = 0.5953373;
  KmRasToRaf1 = 113315.3;
  kpRaf1 = 606.4584;
  KmpRaf1 = 5100194;
  kpBRaf = 216.8293;
  KmpBRaf = 52829.8;
  kdMek = 0.7986598;
  KmdMek = 1645511;
  kpMekCytoplasmic = 9.646808;
  KmpMekCytoplasmic = 545771.5;
  kdErk = 3.542045;
  KmdErk = 1.180521e7;
  kpP90Rsk = 0.08004356;
  KmpP90Rsk = 535308.1;
  kPI3K = 5.414331;
  KmPI3K = 184150.5;
  kPI3KRas = 0.0228966;
  KmPI3KRas = 169817.7;
  kAkt = 0.02094096;
  KmAkt = 179694.3;
  kdRaf1ByAkt = 11.77689;
  KmRaf1ByAkt = 424976.6;
  kC3GNGF = 342.4519;
  KmC3GNGF = 41671.82;
  kC3G = 1.506941;
  KmC3G = 6516.996;
  kRapGap = 37.24624;
  KmRapGap = 1129784;
  kRap1ToBRaf = 0.5631879;
  KmRap1ToBRaf = 826560.8;
  kdRaf1 = 0.0355408;
  KmdRaf1 = 813.4982;
  kdBRaf = 204.6759;
  KmdBRaf = 5581332;

  // Reactions:
  EGFBindingReaction: EGF + freeEGFReceptor -> boundEGFReceptor; cell*krbEGF*EGF*freeEGFReceptor;
  EGFUnbindingReaction: boundEGFReceptor -> EGF + freeEGFReceptor; cell*kruEGF*boundEGFReceptor;
  NGFBindingReaction: NGF + freeNGFReceptor -> boundNGFReceptor; krbNGF*NGF*freeNGFReceptor*cell;
  NGFUnbindingReaction: boundNGFReceptor -> NGF + freeNGFReceptor; kruNGF*boundNGFReceptor*cell;
  SosActivationByEGFReaction: SosInactive -> SosActive; cell*(kEGF*boundEGFReceptor*SosInactive/(SosInactive + KmEGF));
  SosActivationByNGFReaction: SosInactive -> SosActive; cell*(kNGF*boundNGFReceptor*SosInactive/(SosInactive + KmNGF));
  SosDeactivationReaction: SosActive -> SosInactive; cell*(kdSos*P90RskActive*SosActive/(SosActive + KmdSos));
  RasActivationReaction: RasInactive -> RasActive; cell*(kSos*SosActive*RasInactive/(RasInactive + KmSos));
  RasDeactivationReaction: RasActive -> RasInactive; cell*(kRasGap*RasGapActive*RasActive/(RasActive + KmRasGap));
  Raf1ByRasActivationReaction: Raf1Inactive -> Raf1Active; cell*(kRasToRaf1*RasActive*Raf1Inactive/(Raf1Inactive + KmRasToRaf1));
  MekbyRaf1ActivationReaction: MekInactive -> MekActive; cell*(kpRaf1*Raf1Active*MekInactive/(MekInactive + KmpRaf1));
  MekbyBRafActivationReaction: MekInactive -> MekActive; cell*(kpBRaf*BRafActive*MekInactive/(MekInactive + KmpBRaf));
  ErkActivationReaction: ErkInactive -> ErkActive; cell*(kpMekCytoplasmic*MekActive*ErkInactive/(ErkInactive + KmpMekCytoplasmic));
  MekDeactivationReaction: MekActive -> MekInactive; cell*(kdMek*PP2AActive*MekActive/(MekActive + KmdMek));
  ErkDeactivationReaction: ErkActive -> ErkInactive; cell*(kdErk*PP2AActive*ErkActive/(ErkActive + KmdErk));
  Raf1byPPtaseDeactivationReaction: Raf1Active -> Raf1Inactive; cell*(kdRaf1*Raf1PPtase*Raf1Active/(Raf1Active + KmdRaf1));
  P90RskActivationReaction: P90RskInactive -> P90RskActive; cell*(kpP90Rsk*ErkActive*P90RskInactive/(P90RskInactive + KmpP90Rsk));
  PI3KbyEGFRActivationReaction: PI3KInactive -> PI3KActive; cell*(kPI3K*boundEGFReceptor*PI3KInactive/(PI3KInactive + KmPI3K));
  PI3KbyRasActivationReaction: PI3KInactive -> PI3KActive; cell*(kPI3KRas*RasActive*PI3KInactive/(PI3KInactive + KmPI3KRas));
  AktActivationReaction: AktInactive -> AktActive; cell*(kAkt*PI3KActive*AktInactive/(AktInactive + KmAkt));
  Raf1ByAktDeactivationReaction: Raf1Active -> Raf1Inactive; cell*(kdRaf1ByAkt*AktActive*Raf1Active/(Raf1Active + KmRaf1ByAkt));
  C3GActivationReaction: C3GInactive -> C3GActive; cell*(kC3GNGF*boundNGFReceptor*C3GInactive/(C3GInactive + KmC3GNGF));
  Rap1ActivationReaction: Rap1Inactive -> Rap1Active; cell*(kC3G*C3GActive*Rap1Inactive/(Rap1Inactive + KmC3G));
  Rap1DeactivationReaction: Rap1Active -> Rap1Inactive; cell*(kRapGap*RapGapActive*Rap1Active/(Rap1Active + KmRapGap));
  BRafByRap1ActivationReaction: BRafInactive -> BRafActive; cell*(kRap1ToBRaf*Rap1Active*BRafInactive/(BRafInactive + KmRap1ToBRaf));
  BRafbyPPtaseDeactivationReaction: BRafActive -> BRafInactive; cell*(kdBRaf*Raf1PPtase*BRafActive/(BRafActive + KmdBRaf));
end
