// SBML level 2 version 3

model Updated_LOV_zdk_Deterministic()

  // Compartments:
  compartment Cytosol = 50000 um3;
  compartment EC = 50000 um3;
  compartment PM = 6563;  // 2-D

  // Species:
  species Li in PM = Li_ss;  // substance in molecules
  species La in PM = La_init;  // substance in molecules
  species LiZ in PM = LiZ_ss;  // substance in molecules
  species zdk in Cytosol = zdk_ss;  // substance in molecules
  species LaZ in PM = LaZ_init;  // substance in molecules

  // Parameters:
  Kd1 = 0.026 uM;
  KfActive1 has s_1_uM_1;
  KfActive2 = 3 s_1_uM_1;
  KfActive3 = 10 s_1;
  Kd2 = 4 uM;
  Act_light has _one_;
  Receptor_Occupancy has _one_;
  Offset = 20130 _one_;
  constant = 2233 _one_;
  Reflection has _one_;
  Fluorescense has _one_;
  LOV_fluorescence has _one_;
  A = 22271.28 _one_;
  B = 23502.1 _one_;
  C = 21789.29 _one_;
  D = 19530.22 _one_;
  Time0 = 15 s;
  Time1 = 22 s;
  predicted_signal_norefl has _one_;
  KrActive3 = 0.01 s_1;
  ideal_fluor_norefl has _one_;
  ideal_background = 22271.28 _one_;
  ideal_unboundF = 1712.81937 _one_;
  predicted_signal_wrefl has _one_;
  ideal_fluor_wrefl has _one_;
  Gain = 2204.4 _one_;
  Time2 = 1 s;
  Time3 = 40 s;
  zdk_init = 1 uM;
  Li_init = 100 molecules_um_2;
  La_init = 0 molecules_um_2;
  LiZ_init = 0 molecules_um_2;
  LaZ_init = 0 molecules_um_2;
  K_zdk_tot has um3_uM;
  SizePM = 6563 um2;
  SizeCyt = 50000 um3;
  UnitFactor = 0.00166113 um3_uM_molecules_1;
  K_Li_tot has um3_uM;
  VarA has molecules_um_2;
  VarB has uM;
  VarC has um2_uM_molecules_1;
  zdk_ss has uM;
  LiZ_ss has molecules_um_2;
  Li_ss has molecules_um_2;
  Li_function has molecules_um_2;
  Li_zdk_ratio has _one_;
  Kf_Li__La has s_1;
  Kr_Li__La has s_1;
  Kf_Li_zdk has s_1_uM_1;
  Kr_Li_zdk has s_1;
  Kf_LaZ__La_Z has s_1;
  Kr_LaZ__La_Z has s_1_uM_1;
  Kf_LiZ_LaZ has s_1;
  Kr_LiZ_LaZ has s_1;

  // Assignment rules:
  KfActive1 := KfActive2;
  Act_light := piecewise(1, (time > Time0) && (time < Time1), 0);
  Receptor_Occupancy := (LiZ + LaZ)*(1/(Li + LiZ + LaZ + La));
  Reflection := constant*Act_light;
  Fluorescense := A + piecewise(Reflection + (-A) + (B + (-C))*exp(2*(Time0 + (-time))), time > Time0, 0) + piecewise(D + (-C), time > Time1, 0);
  LOV_fluorescence := Receptor_Occupancy*Gain;
  predicted_signal_norefl := LOV_fluorescence + Offset;
  ideal_fluor_norefl := ideal_background + (-piecewise(ideal_unboundF*(1 + (-exp(-(2*(time + (-Time0)))))), time > Time0, 0));
  predicted_signal_wrefl := predicted_signal_norefl + Reflection;
  ideal_fluor_wrefl := ideal_fluor_norefl + Reflection;
  K_zdk_tot := SizeCyt*zdk_init + SizePM*UnitFactor*LiZ_init;
  K_Li_tot := SizePM*UnitFactor*Li_init + SizePM*UnitFactor*LiZ_init;
  VarA := K_Li_tot*(1/(SizePM*UnitFactor));
  VarB := K_zdk_tot*(1/SizeCyt);
  VarC := SizePM*UnitFactor*(1/SizeCyt);
  LiZ_ss := (VarB + VarA*VarC + Kd1 + (-sqrt((VarA*VarC + VarB + Kd1)^2 + (-(4*VarA*VarB*VarC)))))*(1/(2*VarC));
  zdk_ss := VarB + (-(VarC*LiZ_ss));
  Li_ss := VarA + (-LiZ_ss);
  g0 := SizePM*UnitFactor*Li + SizePM*UnitFactor*LiZ;
  Li_function := VarA + (-LiZ);
  Li_zdk_ratio := Li_init*(1/zdk_init);
  Kf_Li__La := KfActive3*Act_light;
  Kr_Li__La := KrActive3;
  Kf_Li_zdk := KfActive1;
  Kr_Li_zdk := Kd1*KfActive1;
  Kf_LaZ__La_Z := Kd2*KfActive2;
  Kr_LaZ__La_Z := KfActive2;
  Kf_LiZ_LaZ := KfActive3*Act_light;
  Kr_LiZ_LaZ := KrActive3;

  // Reactions:
  Li__La: Li -> La; Kf_Li__La*Li + (-(Kr_Li__La*La)); Li__La is "Li->La";
    Li__La_I = 0 pA_um_2; Li__La_netValence = 1 _one_;
  Li_zdk: Li + zdk -> LiZ; Kf_Li_zdk*Li*zdk + (-(Kr_Li_zdk*LiZ));
    Li_zdk_I = 0 pA_um_2; Li_zdk_netValence = 1 _one_;
  LaZ__La_Z: LaZ -> zdk + La; Kf_LaZ__La_Z*LaZ + (-(Kr_LaZ__La_Z*zdk*La)); LaZ__La_Z is "LaZ->La_Z";
    LaZ__La_Z_I = 0 pA_um_2; LaZ__La_Z_netValence = 1 _one_;
  LiZ_LaZ: LiZ -> LaZ; Kf_LiZ_LaZ*LiZ + (-(Kr_LiZ_LaZ*LaZ));
    LiZ_LaZ_I = 0 pA_um_2; LiZ_LaZ_netValence = 1 _one_;

  // Unit definitions:
  unit substance = item;
  unit volume = (1e-18 metre)^3;
  unit area = (1e-12 metre)^2;
  unit length = 1e-6 metre;
  unit time = second;
  unit molecules = item;
  unit uM = 1e-3 dimensionless * mole * metre^3;
  unit s_1_uM_1 = 1000 dimensionless * metre^3 / (mole * second);
  unit s_1 = 1 / second;
  unit _one_ = dimensionless;
  unit s = second;
  unit molecules_um_2 = 1e12 dimensionless * item / metre^2;
  unit um3_uM = 1e-21 mole;
  unit um3 = (1e-18 metre)^3;
  unit um3_uM_molecules_1 = 1e-21 dimensionless * mole / item;
  unit um2_uM_molecules_1 = 1e-15 dimensionless * mole / (item * metre);
  unit molecules_um_2_s_1 = 1e12 dimensionless * item / (metre^2 * second);
  unit pA_um_2 = ampere / metre^2;
end
