// SBML level 2 version 4

model Updated_LOV_zdk_Deterministic_Updated_LOV_zdk_Deterministic()

  // Compartments:
  compartment EC = 5e-47 litre;
  compartment Cytosol = 5e-47 litre;
  compartment PM = 6.563e-21;  // 2-D

  // Species:
  species Li in PM = 1.66113*Li_ss;  // substance in mol
  species La in PM = 1.66113*La_init;  // substance in mol
  species LiZ in PM = 1.66113*LiZ_ss;  // substance in mol
  species zdk in Cytosol = 1.66113e27*zdk_ss;  // substance in mol
  species LaZ in PM = 1.66113*LaZ_init;  // substance in mol

  // Parameters:
  Kd1 = 0.026 _zero__001_mol_m3;
  KfActive1 has _one_000_m3_mol_1_s_1;
  KfActive2 = 3 _one_000_m3_mol_1_s_1;
  KfActive3 = 10 s_1;
  Kd2 = 4 _zero__001_mol_m3;
  Act_light = 0 _one_;
  Receptor_Occupancy has _one_;
  constant = 2233 _one_;
  Reflection has _one_;
  LOV_fluorescence has _one_;
  predicted_signal_norefl has _one_;
  KrActive3 = 0.01 s_1;
  ideal_background = 22271.28 _one_;
  ideal_unboundF = 1712.81937 _one_;
  predicted_signal_wrefl has _one_;
  Gain = 98 _one_;
  Time2 = 1 s;
  Time3 = 40 s;
  zdk_init = 1 _zero__001_mol_m3;
  Li_init = 100 _one__0E12_molecules_m_2;
  La_init = 0 _one__0E12_molecules_m_2;
  LiZ_init = 0 _one__0E12_molecules_m_2;
  LaZ_init = 0 _one__0E12_molecules_m_2;
  K_zdk_tot has _one__0E_21_mol;
  SizePM = 6563;
  SizeCyt = 50000 _one__0000000000000002E_54_m3;
  UnitFactor = 0.00166113 _one__0E_21_mol_molecules_1;
  K_Li_tot has _one__0E_21_mol;
  VarA has _one__0E12_molecules_m_2;
  VarB has _zero__001_mol_m3;
  VarC has _one__0E_15_mol_molecules_1_m_1;
  zdk_ss has _zero__001_mol_m3;
  LiZ_ss has _one__0E12_molecules_m_2;
  Li_ss has _one__0E12_molecules_m_2;
  Li_function has _one__0E12_molecules_m_2;
  Li_zdk_ratio has _one_;
  UF = 602;
  Kf_Li__La has s_1;
  Kr_Li__La has s_1;
  Kf_Li_zdk has _one_000_m3_mol_1_s_1;
  Kr_Li_zdk has s_1;
  Kf_LaZ__La_Z has s_1;
  Kr_LaZ__La_Z has _one_000_m3_mol_1_s_1;
  Kf_LiZ_LaZ has s_1;
  Kr_LiZ_LaZ has s_1;

  // Assignment rules:
  KfActive1 := KfActive2;
  Receptor_Occupancy := (0.602*LiZ + 0.602*LaZ)*(1/(0.602*Li + 0.602*LiZ + 0.602*LaZ + 0.602*La));
  Reflection := constant*Act_light;
  Cyt_fluor := 0.3678794*(1/(6.02e-28*zdk));
  LOV_fluorescence := Gain*(Receptor_Occupancy + Cyt_fluor*UF);
  predicted_signal_norefl := LOV_fluorescence;
  predicted_signal_wrefl := predicted_signal_norefl + Reflection;
  K_zdk_tot := SizeCyt*zdk_init + SizePM*UnitFactor*LiZ_init;
  K_Li_tot := SizePM*UnitFactor*Li_init + SizePM*UnitFactor*LiZ_init;
  VarA := K_Li_tot*(1/(SizePM*UnitFactor));
  VarB := K_zdk_tot*(1/SizeCyt);
  VarC := SizePM*UnitFactor*(1/SizeCyt);
  LiZ_ss := (VarB + VarA*VarC + Kd1 + (-((VarA*VarC + VarB + Kd1)^2 + (-(4*VarA*VarB*VarC)))^0.5))*(1/(2*VarC));
  zdk_ss := VarB + (-(VarC*LiZ_ss));
  Li_ss := VarA + (-LiZ_ss);
  g0 := 0.602*SizePM*UnitFactor*Li + 0.602*SizePM*UnitFactor*LiZ;
  Li_function := VarA + (-(0.602*LiZ));
  Li_zdk_ratio := Li_init*(1/zdk_init);
  Kf_Li__La := KfActive3*Act_light;
  Kr_Li__La := KrActive3;
  Kf_Li_zdk := KfActive1;
  Kr_Li_zdk := Kd1*KfActive1;
  Kf_LaZ__La_Z := Kd2*KfActive2;
  Kr_LaZ__La_Z := KfActive2;
  Kf_LiZ_LaZ := KfActive3*Act_light;
  Kr_LiZ_LaZ := KrActive3;

  // Reactions:
  Li__La: Li -> La; 1.66113e-24*(0.602*Kf_Li__La*Li + (-(0.602*Kr_Li__La*La)));
    Li__La_LumpedI = 0 pA; Li__La_netValence = 1 _one_;
  Li_zdk: zdk + Li -> LiZ; 1.66113e-24*(3.62404e-28*Kf_Li_zdk*Li*zdk + (-(0.602*Kr_Li_zdk*LiZ)));
    Li_zdk_LumpedI = 0 pA; Li_zdk_netValence = 1 _one_;
  LaZ__La_Z: LaZ -> zdk + La; 1.66113e-24*(0.602*Kf_LaZ__La_Z*LaZ + (-(3.62404e-28*Kr_LaZ__La_Z*zdk*La)));
    LaZ__La_Z_LumpedI = 0 pA; LaZ__La_Z_netValence = 1 _one_;
  LiZ_LaZ: LiZ -> LaZ; 1.66113e-24*(0.602*Kf_LiZ_LaZ*LiZ + (-(0.602*Kr_LiZ_LaZ*LaZ)));
    LiZ_LaZ_LumpedI = 0 pA; LiZ_LaZ_netValence = 1 _one_;

  // Events:
  event0: at (time > 1): Act_light = 1;
  event1: at (time > 15): Act_light = 0;

  // Unit definitions:
  unit substance = mole;
  unit area = metre^2;
  unit length = metre;
  unit time = second;
  unit mol = mole;
  unit _zero__001_mol_m3 = 1e-3 dimensionless * metre^3 * mole;
  unit _one_000_m3_mol_1_s_1 = 1000 dimensionless * metre^3 / (mole * second);
  unit s_1 = 1 / second;
  unit _one_ = dimensionless;
  unit s = second;
  unit _one__0E12_molecules_m_2 = 1e12 dimensionless * item / metre^2;
  unit _one__0E_21_mol = 1e-21 mole;
  unit _one__0000000000000002E_54_m3 = (1e-54 metre)^3;
  unit _one__0E_21_mol_molecules_1 = 1e-21 dimensionless * mole / item;
  unit _one__0E_15_mol_molecules_1_m_1 = 1e-15 dimensionless * mole / (item * metre);
  unit pA = 1e-12 ampere;
  unit mol_s_1 = mole / second;
end
