// SBML level 2 version 1

model Kholodenko2000_MAPK_feedback()

  // Compartments:
  compartment uVol = 1;

  // Species:
  substanceOnly species MKKK in uVol = 90; MKKK is "MAPKKK";
  substanceOnly species MKKK_P in uVol = 10; MKKK_P is "MAPKKK-P";
  substanceOnly species MKK in uVol = 280; MKK is "MAPKK";
  substanceOnly species MKK_P in uVol = 10; MKK_P is "MAPKK-P";
  substanceOnly species MKK_PP in uVol = 10; MKK_PP is "MAPKK-PP";
  substanceOnly species MAPK in uVol = 280;
  substanceOnly species MAPK_P in uVol = 10; MAPK_P is "MAPK-P";
  substanceOnly species MAPK_PP in uVol = 10; MAPK_PP is "MAPK-PP";

  // Reactions:
  J0: MKKK => MKKK_P; V1*MKKK/((1 + (MAPK_PP/Ki)^n)*(K1 + MKKK)); J0 is "MAPKKK activation";  // modifiers: MAPK_PP
    V1 = 2.5; Ki = 9; n = 1; K1 = 10;
  J1: MKKK_P => MKKK; V2*MKKK_P/(KK2 + MKKK_P); J1 is "MAPKKK inactivation";
    V2 = 0.25; KK2 = 8;
  J2: MKK => MKK_P; k3*MKKK_P*MKK/(KK3 + MKK); J2 is "phosphorylation of MAPKK";  // modifiers: MKKK_P
    k3 = 0.025; KK3 = 15;
  J3: MKK_P => MKK_PP; k4*MKKK_P*MKK_P/(KK4 + MKK_P); J3 is "phosphorylation of MAPKK-P";  // modifiers: MKKK_P
    k4 = 0.025; KK4 = 15;
  J4: MKK_PP => MKK_P; V5*MKK_PP/(KK5 + MKK_PP); J4 is "dephosphorylation of MAPKK-PP";
    V5 = 0.75; KK5 = 15;
  J5: MKK_P => MKK; V6*MKK_P/(KK6 + MKK_P); J5 is "dephosphorylation of MAPKK-P";
    V6 = 0.75; KK6 = 15;
  J6: MAPK => MAPK_P; k7*MKK_PP*MAPK/(KK7 + MAPK); J6 is "phosphorylation of MAPK";  // modifiers: MKK_PP
    k7 = 0.025; KK7 = 15;
  J7: MAPK_P => MAPK_PP; k8*MKK_PP*MAPK_P/(KK8 + MAPK_P); J7 is "phosphorylation of MAPK-P";  // modifiers: MKK_PP
    k8 = 0.025; KK8 = 15;
  J8: MAPK_PP => MAPK_P; V9*MAPK_PP/(KK9 + MAPK_PP); J8 is "dephosphorylation of MAPK-PP";
    V9 = 0.5; KK9 = 15;
  J9: MAPK_P => MAPK; V10*MAPK_P/(KK10 + MAPK_P); J9 is "dephosphorylation of MAPK-P";
    V10 = 0.5; KK10 = 15;
end
