// SBML level 2 version 1

model mod()
  // Edelstein1996_EPSP_AChSpecies

  // Compartments:
  compartment comp1 = 1e-16 litre; comp1 is "compartment1";

  // Species:
  // biliganded basal state
  substanceOnly species BLL in comp1 = 0; BLL is "BasalACh2";  // substance in mole
  // monoliganded intermediate
  substanceOnly species IL in comp1 = 0; IL is "IntermediateACh";  // substance in mole
  // monoliganded active state
  substanceOnly species AL in comp1 = 0; AL is "ActiveACh";  // substance in mole
  // unkiganded active state
  substanceOnly species A in comp1 = 0; A is "Active";  // substance in mole
  // monoliganded basal state
  substanceOnly species BL in comp1 = 0; BL is "BasalACh";  // substance in mole
  // unliganded basal state
  substanceOnly species B in comp1 = 1.660578e-21; B is "Basal";  // substance in mole
  // biliganded desensitised state
  substanceOnly species DLL in comp1 = 0; DLL is "DesensitisedACh2";  // substance in mole
  // fully desensitised state
  substanceOnly species D in comp1 = 0; D is "Desensitised";  // substance in mole
  // biliganded intermediate
  substanceOnly species ILL in comp1 = 0; ILL is "IntermediateACh2";  // substance in mole
  // monoliganded desensitised state
  substanceOnly species DL in comp1 = 0; DL is "DesensitisedACh";  // substance in mole
  // unliganted intermediate
  substanceOnly species I in comp1 = 0; I is "Intermediate";  // substance in mole
  // biliganted active state
  substanceOnly species ALL in comp1 = 0; ALL is "ActiveACh2";  // substance in mole
  // ligand
  substanceOnly species L in comp1 = 1.660578e-20; L is "acetylcholine";  // substance in mole

  // Parameters:
  kf_0 = 3e8 bimolRate;
  kr_0 = 8000 unimolRate;
  kf_1 = 1.5e8 bimolRate;
  kr_1 = 16000 unimolRate;
  kf_2 = 3e4 unimolRate;
  kr_2 = 7e2 unimolRate;
  kf_3 = 3e8 bimolRate;
  kr_3 = 8.64 unimolRate;
  kf_4 = 1.5e8 bimolRate;
  kr_4 = 17.28 unimolRate;
  kf_5 = 0.54 unimolRate;
  kr_5 = 1.08e4 unimolRate;
  kf_6 = 1.3e2 unimolRate;
  kr_6 = 2.74e3 unimolRate;
  kf_7 = 3e8 bimolRate;
  kr_7 = 4 unimolRate;
  kf_8 = 1.5e8 bimolRate;
  kr_8 = 8 unimolRate;
  kf_9 = 19.7 unimolRate;
  kr_9 = 3.74 unimolRate;
  kf_10 = 19.85 unimolRate;
  kr_10 = 1.74 unimolRate;
  kf_11 = 20 unimolRate;
  kr_11 = 0.81 unimolRate;
  kf_12 = 3e8 bimolRate;
  kr_12 = 4 unimolRate;
  kf_13 = 1.5e8 bimolRate;
  kr_13 = 8 unimolRate;
  kf_14 = 0.05 unimolRate;
  kr_14 = 0.0012 unimolRate;
  kf_15 = 0.05 unimolRate;
  kr_15 = 0.0012 unimolRate;
  kf_16 = 0.05 unimolRate;
  kr_16 = 0.0012 unimolRate;

  // Reactions:
  // (kf_0 * B * L - kr_0 * BL) * comp1
  // first ligand on basal
  React0: B + L -> BL; kf_0*B*L - kr_0*BL;
  // (kf_1 * BL * L - kr_1 * BLL) * comp1
  // second ligand on basal
  React1: BL + L -> BLL; kf_1*BL*L - kr_1*BLL;
  // (kf_2 * BLL - kr_2 * ALL) * comp1
  // opening of biliganded
  React2: BLL -> ALL; kf_2*BLL - kr_2*ALL;
  // (kf_3 * A * L - kr_3 * AL) * comp1
  // first ligand on active
  React3: A + L -> AL; kf_3*A*L - kr_3*AL;
  // (kf_4 * AL * L - kr_4 * ALL) * comp1
  // second ligand on active
  React4: AL + L -> ALL; kf_4*AL*L - kr_4*ALL;
  // (kf_5 * B - kr_5 * A) * comp1
  // opening of unliganded
  React5: B -> A; kf_5*B - kr_5*A;
  // (kf_6 * BL - kr_6 * AL) * comp1
  // opening of monoliganded
  React6: BL -> AL; kf_6*BL - kr_6*AL;
  // (kf_7 * I * L - kr_7 * IL) * comp1
  // first ligand on intermediate
  React7: I + L -> IL; kf_7*I*L - kr_7*IL;
  // (kf_8 * IL * L - kr_8 * ILL) * comp1
  // second ligand on intermediate
  React8: IL + L -> ILL; kf_8*IL*L - kr_8*ILL;
  // (kf_9 * A - kr_9 * I) * comp1
  // unlig act <=> unlig interm
  React9: A -> I; kf_9*A - kr_9*I;
  // (kf_10 * AL - kr_10 * IL) * comp1
  // monolig act <=> monolig interm
  React10: AL -> IL; kf_10*AL - kr_10*IL;
  // (kf_11 * ALL - kr_11 * ILL) * comp1
  // bilig act <=> bilig interm
  React11: ALL -> ILL; kf_11*ALL - kr_11*ILL;
  // (kf_12 * D * L - kr_12 * DL) * comp1
  // first ligand on desensitised
  React12: D + L -> DL; kf_12*D*L - kr_12*DL;
  // (kf_13 * DL * L - kr_13 * DLL) * comp1
  // second ligand on desensitised
  React13: DL + L -> DLL; kf_13*DL*L - kr_13*DLL;
  // (kf_14 * I - kr_14 * D) * comp1
  // unlig interm <=> unlig desen
  React14: I -> D; kf_14*I - kr_14*D;
  // (kf_15 * IL - kr_15 * DL) * comp1
  // monolig interm <=> monolig desen
  React15: IL -> DL; kf_15*IL - kr_15*DL;
  // (kf_16 * ILL - kr_16 * DLL) * comp1
  // bilig interm <=> bilig desen
  React16: ILL -> DLL; kf_16*ILL - kr_16*DLL;

  // Unit definitions:
  unit unimolRate = 1 / second;
  unit bimolRate = 1 / (mole * litre * second);
end
