// SBML level 1 version 1
// Created by XMLPrettyPrinter on 12/12/2002
// Modified by DEZ 10/12/2003
// Model Starts Here

model untitled()

  // Compartments:
  compartment uVol = 1;

  // Species:
  species MA in uVol = 46/uVol;
  species A in uVol = 16131/uVol;
  species PAA in uVol = 0;
  species APAA in uVol = 2/uVol;
  species PBAF in uVol = 0;
  species APBAF in uVol = 2/uVol;
  species F2PBAF in uVol = 0;
  species AF2PBAF in uVol = 0;
  species MB in uVol = 6/uVol;
  species B in uVol = 46/uVol;
  species AB in uVol = 1152/uVol;
  species time_source in uVol = 1/uVol;
  species time_ in uVol = 0;
  species S_t in uVol = 1/uVol;
  species Q in uVol = 0;
  species EQ in uVol = 0;
  species E in uVol = 145280/uVol;
  species EQPFEQ in uVol = 0;
  species PFEQ in uVol = 2/uVol;
  species MF in uVol = 0;
  species F in uVol = 17/uVol;
  species F2 in uVol = 0;
  species ME in uVol = 6/uVol;
  species PED in uVol = 2/uVol;
  species D2PED in uVol = 0;
  species PDCF in uVol = 0;
  species F2PDCF in uVol = 0;
  species C2PDCF in uVol = 2/uVol;
  species C2F2PDCF in uVol = 0;
  species D2PCAD in uVol = 0;
  species PCAD in uVol = 0;
  species AD2PCAD in uVol = 0;
  species APCAD in uVol = 2/uVol;
  species MD in uVol = 0;
  species D in uVol = 16/uVol;
  species D2 in uVol = 0;
  species MC in uVol = 46/uVol;
  species C in uVol = 2205/uVol;
  species C2 in uVol = 7534/uVol;
  species PGC in uVol = 0;
  species C2PGC in uVol = 2/uVol;
  species PKC in uVol = 0;
  species C2PKC in uVol = 2/uVol;
  species MG in uVol = 3/uVol;
  species G in uVol = 474/uVol;
  species G2 in uVol = 348/uVol;
  species MK in uVol = 3/uVol;
  species K in uVol = 474/uVol;
  species K2 in uVol = 348/uVol;
  species G2PHG in uVol = 1/uVol;
  species PHG in uVol = 1/uVol;
  species MH in uVol = 10/uVol;
  species H in uVol = 1201335/uVol;
  species K2PJK in uVol = 1/uVol;
  species PJK in uVol = 1/uVol;
  species MJ in uVol = 60/uVol;
  species J in uVol = 192135/uVol;
  species X in uVol = 0;

  // Reactions:
  RTA: MA => A + MA; kTA*MA;
    kTA = 2.5;
  RTB: MB => B + MB; kTB*MB;
    kTB = 1.2;
  RDMA: MA => X; kDMA*MA;
    kDMA = 0.031;
  RDA: A => X; kDA*A;
    kDA = 0.0066;
  RDMB: MB => X; kDMB*MB;
    kDMB = 0.011;
  RDB: B => X; kDB*B;
    kDB = 0.0029;
  RDAB: AB => X; kDAB*AB;
    kDAB = 0.0066;
  RAB: A + B => AB; kAB*A*B;
    kAB = 0.0059;
  RUAB: AB => A + B; kUAB*AB;
    kUAB = 3.8;
  RA_B_PAA: A + PAA => APAA; kPAA*A*PAA;
    kPAA = 0.00075;
  RA_B_PBAF: A + PBAF => APBAF; RA_B_PBAF_kPBAF*A*PBAF;
    RA_B_PBAF_kPBAF = 0.00075;
  RA_B_F2PBAF: A + F2PBAF => AF2PBAF; RA_B_F2PBAF_kPBAF*A*F2PBAF;
    RA_B_F2PBAF_kPBAF = 0.00075;
  RRPAA: PAA => MA + PAA; kRPAA*PAA;
    kRPAA = 0.00073;
  RRAPAA: APAA => MA + APAA; kRAPAA*APAA;
    kRAPAA = 0.73;
  RRAPBAF: APBAF => MB + APBAF; kRAPBAF*APBAF;
    kRAPBAF = 0.036;
  RRPBAF: PBAF => MB + PBAF; kRPBAF*PBAF;
    kRPBAF = 0.00036;
  RRF2PBAF: F2PBAF => MB + F2PBAF; kRF2PBAF*F2PBAF;
    kRF2PBAF = 0.36;
  RRAF2PBAF: AF2PBAF => MB + AF2PBAF; kRAF2PBAF*AF2PBAF;
    kRAF2PBAF = 0.72;
  RA_U_APAA: APAA => A + PAA; kUPAA*APAA;
    kUPAA = 0.39;
  RA_U_APBAF: APBAF => A + PBAF; RA_U_APBAF_kUPBAF*APBAF;
    RA_U_APBAF_kUPBAF = 0.39;
  RA_U_AF2PBAF: AF2PBAF => A + F2PBAF; RA_U_AF2PBAF_kUPBAF*AF2PBAF;
    RA_U_AF2PBAF_kUPBAF = 0.39;
  Rtime: time_source => time_ + time_source; time_source;
  RQ_source: S_t => Q + S_t; CQ*S_t;
    CQ = 752.5;
  REQ: Q + E => EQ; kEQ*Q*E;
    kEQ = 0.0024;
  RUEQ: EQ => Q + E; kUEQ*EQ;
    kUEQ = 3.6;
  REQ_U_PFEQ: EQPFEQ => PFEQ + EQ; kUPFEQ*EQPFEQ;
    kUPFEQ = 0.39;
  REQ_B_PFEQ: EQ + PFEQ => EQPFEQ; kPFEQ*EQ*PFEQ;
    kPFEQ = 0.00075;
  RRPFEQ: PFEQ => MF + PFEQ; kRPFEQ*PFEQ;
    kRPFEQ = 0.00073;
  RREQPFEQ: EQPFEQ => MF + EQPFEQ; kREQPFEQ*EQPFEQ;
    kREQPFEQ = 0.73;
  RDF: F => X; kDF*F;
    kDF = 0.0066;
  RDQ: Q => X; kDQ*Q;
    kDQ = 1;
  RDMF: MF => X; kDMF*MF;
    kDMF = 0.031;
  RDF2: F2 => X; kDF2*F2;
    kDF2 = 0.0066;
  RDEQ: EQ => X; kDEQ*EQ;
    kDEQ = 0.0066;
  RDE: E => X; kDE*E;
    kDE = 0.00078;
  RTF: MF => F + MF; kTF*MF;
    kTF = 2.5;
  RUF2: F2 => 2 F; kUF2*F2;
    kUF2 = 3.8;
  RF2_U_F2PBAF: F2PBAF => PBAF + F2; RF2_U_F2PBAF_kUPBAF*F2PBAF;
    RF2_U_F2PBAF_kUPBAF = 0.39;
  RF2_U_AF2PBAF: AF2PBAF => APBAF + F2; RF2_U_AF2PBAF_kUPBAF*AF2PBAF;
    RF2_U_AF2PBAF_kUPBAF = 0.39;
  RF2_B_PBAF: F2 + PBAF => F2PBAF; RF2_B_PBAF_kPBAF*F2*PBAF;
    RF2_B_PBAF_kPBAF = 0.00075;
  RF2_B_APBAF: F2 + APBAF => AF2PBAF; RF2_B_APBAF_kPBAF*F2*APBAF;
    RF2_B_APBAF_kPBAF = 0.00075;
  RTE: ME => E + ME; kTE*ME;
    kTE = 18.9;
  RDME: ME => X; kDME*ME;
    kDME = 0.0014;
  RRPED: PED => ME + PED; kRPED*PED;
    kRPED = 0.0042;
  RRD2PED: D2PED => ME + D2PED; kRD2PED*D2PED;
    kRD2PED = 0.00000042;
  RRPDCF: PDCF => MD + PDCF; kRPDCF*PDCF;
    kRPDCF = 0.00073;
  RRF2PDCF: F2PDCF => MD + F2PDCF; kRF2PDCF*F2PDCF;
    kRF2PDCF = 0.73;
  RRC2F2PDCF: C2F2PDCF => MD + C2F2PDCF; kRC2F2PDCF*C2F2PDCF;
    kRC2F2PDCF = 0.73;
  RRC2PDCF: C2PDCF => MD + C2PDCF; kRC2PDCF*C2PDCF;
    kRC2PDCF = 0;
  RTD: MD => D + MD; kTD*MD;
    kTD = 2.5;
  RDMD: MD => X; kDMD*MD;
    kDMD = 0.031;
  RDEGD: D => X; kDEGD*D;
    kDEGD = 0.0066;
  RDD2: D2 => X; kDD2*D2;
    kDD2 = 0.0066;
  RUD2: D2 => 2 D; kUD2*D2;
    kUD2 = 3.8;
  RD2_B_PED: D2 + PED => D2PED; kPED*D2*PED;
    kPED = 0.00075;
  RD2_U_D2PED: D2PED => PED + D2; kUPED*D2PED;
    kUPED = 0.39;
  RDMC: MC => X; kDMC*MC;
    kDMC = 0.031;
  RDC: C => X; kDC*C;
    kDC = 0.0066;
  RDC2: C2 => X; kDC2*C2;
    kDC2 = 0.0066;
  RTC: MC => C + MC; kTC*MC;
    kTC = 2.5;
  RUC2: C2 => 2 C; kUC2*C2;
    kUC2 = 3.8;
  RF2_B_PDCF: F2 + PDCF => F2PDCF; RF2_B_PDCF_kPDCF*F2*PDCF;
    RF2_B_PDCF_kPDCF = 0.00075;
  RF2_B_C2PDCF: F2 + C2PDCF => C2F2PDCF; RF2_B_C2PDCF_kPDCF*F2*C2PDCF;
    RF2_B_C2PDCF_kPDCF = 0.00075;
  RF2_U_F2PDCF: F2PDCF => PDCF + F2; RF2_U_F2PDCF_kUPDCF*F2PDCF;
    RF2_U_F2PDCF_kUPDCF = 0.39;
  RF2_U_C2F2PDCF: C2F2PDCF => C2PDCF + F2; RF2_U_C2F2PDCF_kUPDCF*C2F2PDCF;
    RF2_U_C2F2PDCF_kUPDCF = 0.39;
  RRD2PCAD: D2PCAD => MC + D2PCAD; kRD2PCAD*D2PCAD;
    kRD2PCAD = 0;
  RRPCAD: PCAD => MC + PCAD; kRPCAD*PCAD;
    kRPCAD = 0.00073;
  RRAD2PCAD: AD2PCAD => MC + AD2PCAD; kRAD2PCAD*AD2PCAD;
    kRAD2PCAD = 0.073;
  RRAPCAD: APCAD => MC + APCAD; kRAPCAD*APCAD;
    kRAPCAD = 0.73;
  RC2_B_PDCF: C2 + PDCF => C2PDCF; RC2_B_PDCF_kPDCF*C2*PDCF;
    RC2_B_PDCF_kPDCF = 0.00075;
  RC2_B_F2PDCF: C2 + F2PDCF => C2F2PDCF; RC2_B_F2PDCF_kPDCF*C2*F2PDCF;
    RC2_B_F2PDCF_kPDCF = 0.00075;
  RC2_U_C2PDCF: C2PDCF => PDCF + C2; RC2_U_C2PDCF_kUPDCF*C2PDCF;
    RC2_U_C2PDCF_kUPDCF = 0.39;
  RC2_U_C2F2PDCF: C2F2PDCF => F2PDCF + C2; RC2_U_C2F2PDCF_kUPDCF*C2F2PDCF;
    RC2_U_C2F2PDCF_kUPDCF = 0.39;
  RD2_B_PCAD: D2 + PCAD => D2PCAD; RD2_B_PCAD_kPCAD*D2*PCAD;
    RD2_B_PCAD_kPCAD = 0.00075;
  RD2_B_APCAD: D2 + APCAD => AD2PCAD; RD2_B_APCAD_kPCAD*D2*APCAD;
    RD2_B_APCAD_kPCAD = 0.00075;
  RD2_U_D2PCAD: D2PCAD => D2 + PCAD; RD2_U_D2PCAD_kUPCAD*D2PCAD;
    RD2_U_D2PCAD_kUPCAD = 0.39;
  RD2_U_AD2PCAD: AD2PCAD => D2 + APCAD; RD2_U_AD2PCAD_kUPCAD*AD2PCAD;
    RD2_U_AD2PCAD_kUPCAD = 0.39;
  RA_B_PCAD: A + PCAD => APCAD; RA_B_PCAD_kPCAD*A*PCAD;
    RA_B_PCAD_kPCAD = 0.00075;
  RA_U_APCAD: APCAD => PCAD + A; RA_U_APCAD_kUPCAD*APCAD;
    RA_U_APCAD_kUPCAD = 0.39;
  RDMG: MG => X; kDMG*MG;
    kDMG = 0.031;
  RDG: G => X; kDG*G;
    kDG = 0.0066;
  RDG2: G2 => X; kDG2*G2;
    kDG2 = 0.0066;
  RDMH: MH => X; kDMH*MH;
    kDMH = 0.00048;
  RDH: H => X; kDH*H;
    kDH = 0.00016;
  RDK2: K2 => X; kDK2*K2;
    kDK2 = 0.0066;
  RDK: K => X; kDK*K;
    kDK = 0.0066;
  RDMK: MK => X; kDMK*MK;
    kDMK = 0.031;
  RDMJ: MJ => X; kDMJ*MJ;
    kDMJ = 0.0097;
  RDJ: J => X; kDJ*J;
    kDJ = 0.0077;
  RRPGC: PGC => MG + PGC; kRPGC*PGC;
    kRPGC = 0.73;
  RRC2PGC: C2PGC => MG + C2PGC; kRC2PGC*C2PGC;
    kRC2PGC = 0.00073;
  RRG2PHG: G2PHG => MH + G2PHG; kRG2PHG*G2PHG;
    kRG2PHG = 0.0000042;
  RRPHG: PHG => MH + PHG; kRPHG*PHG;
    kRPHG = 0.0042;
  RRK2PJK: K2PJK => MJ + K2PJK; kRK2PJK*K2PJK;
    kRK2PJK = 0.73;
  RRPJK: PJK => MJ + PJK; kRPJK*PJK;
    kRPJK = 0.00073;
  RRPKC: PKC => MK + PKC; kRPKC*PKC;
    kRPKC = 0.73;
  RRC2PKC: C2PKC => MK + C2PKC; kRC2PKC*C2PKC;
    kRC2PKC = 0.00073;
  RTG: MG => G + MG; kTG*MG;
    kTG = 2.5;
  RTH: MH => H + MH; kTH*MH;
    kTH = 18.9;
  RTJ: MJ => J + MJ; kTJ*MJ;
    kTJ = 24.5;
  RTK: MK => K + MK; kTK*MK;
    kTK = 2.5;
  RUG2: G2 => 2 G; kUG2*G2;
    kUG2 = 3.8;
  RUK2: K2 => 2 K; kUK2*K2;
    kUK2 = 3.8;
  RC2_B_PGC: C2 + PGC => C2PGC; kPGC*C2*PGC;
    kPGC = 0.00075;
  RC2_B_PKC: C2 + PKC => C2PKC; kPKC*C2*PKC;
    kPKC = 0.00075;
  RC2_U_C2PGC: C2PGC => PGC + C2; kUPGC*C2PGC;
    kUPGC = 0.39;
  RC2_U_C2PKC: C2PKC => PKC + C2; kUPKC*C2PKC;
    kUPKC = 0.39;
  RG2_B_PHG: G2 + PHG => G2PHG; kPHG*G2*PHG;
    kPHG = 0.00075;
  RK2_B_PJK: K2 + PJK => K2PJK; kPJK*K2*PJK;
    kPJK = 0.00075;
  RG2_U_G2PHG: G2PHG => PHG + G2; kUPHG*G2PHG;
    kUPHG = 0.39;
  RK2_U_K2PJK: K2PJK => PJK + K2; kUPJK*K2PJK;
    kUPJK = 0.39;
  RF2: 2 F => F2; kF2*F^2;
    kF2 = 0.0059;
  RD2: 2 D => D2; kD2*D*D;
    kD2 = 0.0059;
  RC2: 2 C => C2; kC2*C*C;
    kC2 = 0.0059;
  RG2: 2 G => G2; kG2*G;
    kG2 = 0.0059;
  RK2: 2 K => K2; kK2*K*K;
    kK2 = 0.0059;
end
