// SBML level 2 version 1
// Generated 14-January-2005 18:33:44.047929
// Generated by MathSBML 2.4.6 (14-January-2005)
// Generated using Mathematica Version 5.1 for Mac OS X (October 25, 2004)

model GMO()
  // Goldbeter1991_MinMitOscil
  // A Simple Mitotic Oscillator
  // Reference:Goldbeter A (1991)A minimal cascade model for the mitotic oscillator involving cyclin and cdc2 kinase, PNAS 88:9107-9111
  // Web Reference:http://www.pnas.org/cgi/content/abstract/88/20/9107
  // This is a Systems Biology Markup Language (SBML) file, generated by MathSBML 2.4.6 (14-January-2005) 14-January-2005 18:33:39.806932. SBML is a form of XML, and most XML files will not display properly in an internet browser. To view the contents of an XML file use the "Page Source" or equivalent button on you browser.

  // Compartments:
  compartment cell = 1 volume;

  // Species:
  species C in cell = 0.01; C is "Cyclin";
  species M in cell = 0.01; M is "CDC-2 Kinase";
  species X in cell = 0.01; X is "Cyclin Protease";

  // Parameters:
  VM1 = 3;
  VM3 = 1;
  Kc = 0.5;

  // Assignment rules:
  V1 := C*VM1*(C + Kc)^(-1);
  V3 := M*VM3;

  // Reactions:
  creation_of_cyclin: => C; cell*vi;
    vi = 0.025;
  default_degradation_of_cyclin: C => ; C*cell*kd;
    kd = 0.01;
  reaction3: C => ; C*cell*vd*X*(C + Kd)^(-1); reaction3 is "cdc2 kinase triggered degration of cyclin";  // modifiers: X
    vd = 0.25; Kd = 0.02;
  activation_of_cdc2_kinase: => M; cell*(1 + (-1*M))*V1*(K1 + (-1*M) + 1)^(-1);
    K1 = 0.005;
  deactivation_of_cdc2_kinase: M => ; cell*M*V2*(K2 + M)^(-1);
    V2 = 1.5; K2 = 0.005;
  activation_of_cyclin_protease: => X; cell*V3*(1 + (-1*X))*(K3 + (-1*X) + 1)^(-1);
    K3 = 0.005;
  deactivation_of_cyclin_protease: X => ; cell*V4*X*(K4 + X)^(-1);
    K4 = 0.005; V4 = 0.5;
end
